// COMSOL Multiphysics 6.3.0.335 model "Bhatt-HW4-COMSOL-1.mph"
// Outline of the model tree

Parameters
  radius = 10[cm]
  a = 1[cm]
  b = 2[mm]
  p = 0.03[mA]
  d = 4[mm]
  alpha = 0[deg]
  x1 = -8.66[cm]
  y1 = 5[cm]
  x2 = 8.66[cm]
  y2 = 5[cm]
  x3 = 0[cm]
  y3 = -10[cm]

Couplings
  aveop1: Average "Average RA" on boundaries 2
  aveop2: Average "Average LA" on boundaries 8
  aveop3: Average "Average LL" on boundaries 5

Geometry
  geom1 "Geometry 1" (2D, length unit m)
    c1: Circle | r = 0.1
    r1: Rectangle "Right Arm" | size = {a, b}; base = center; pos = {x1, y1}; rot = 60
    r2: Rectangle "Left Arm" | size = {a, b}; base = center; pos = {x2, y2}; rot = -60
    r3: Rectangle "Left Leg" | size = {a, b}; base = center; pos = {x3, y3}
    pt1: Point "Right" | p = {d/2*cos(alpha), d/2*sin(alpha)}
    pt2: Point "Left" | p = {-d/2*cos(alpha), -d/2*sin(alpha)}
    pt3: Point "Ground_ref_1" (disabled)
    r4: Rectangle "Ground_ref_2" (disabled) | size = {a, b}; base = center; pos = {-radius, 0}; rot = 90
    r5: Rectangle "Groud_ref_3" | size = {a, b}; base = center; pos = {radius, 0}; rot = 90
    fin: Finalize "Form Union"
    ige1: IgnoreEdges | input = fin(1) boundaries 3, 4, 6, 9, 10, 12-14, 17, 19-21

Materials
  mat1: Common "Muscle" on domains 2
    def: def "Basic"
      heatcapacity = 3421[J/(kg*K)]
      density = 1090[kg/m^3]
      thermalconductivity = 0.49[W/(m*K)]
      electricconductivity = 0.1
      relpermittivity = 66
  mat2: Common "Steel AISI 4340" on domains 1, 3-5
    def: def "Basic"
      relpermeability = 1
      electricconductivity = 4.032e6[S/m]
      thermalexpansioncoefficient = 12.3e-6[1/K]
      heatcapacity = 475[J/(kg*K)]
      relpermittivity = 1
      density = 7850[kg/m^3]
      thermalconductivity = 44.5[W/(m*K)]
    Enu: Enu "Young's modulus and Poisson's ratio"
      E = 205[GPa]
      nu = 0.28

Physics
  ec: ConductiveMedia "Electric Currents" on all domains
    dependent variable V
    cucn1: CurrentConservation (default)
    ein1: ElectricInsulation (default)
    init1: init "Initial Values 1" (default)
    lcs1: LineCurrentSource "Right_Pos" on points 11 | Qjl = p/d
    lcs2: LineCurrentSource "Left_Neg" on points 8 | Qjl = -p/d
    gnd1: Ground (disabled) on no points
    gnd2: Ground (disabled) on no boundaries
    gnd3: Ground on boundaries 12

Mesh
  mesh1 "Mesh 1" (physics-controlled)
    size: MeshSizeDefault | hauto = 2

Studies
  std1 "Study 1"
    stat: Stationary
  std2 "Study 2"
    param: Parametric "Parametric Sweep" | pname = d; plistarr = range(1[mm], 5[mm], 51[mm]); punit = mm
    stat: Stationary
  std3 "Study 3"
    param: Parametric "Parametric Sweep" | pname = alpha; plistarr = range(-180[deg], 10[deg], 180[deg]); punit = deg
    stat: Stationary
  std4 "Study 4"
    param: Parametric "Parametric Sweep"
      pname = {p, alpha, d}
      plistarr = {2.74[uA] 2.40[uA] 3.72[uA] 20.00[uA] 15.8[uA] 13.22[uA] 3.84[uA] 2.68[uA], 173.4[deg] 113.2[deg] 81.9[deg] 54[deg] 29.5[deg] 12.4[deg] -9.5[deg] -48.2[deg], 4 4 4 4 4 4 4 4}
      punit = {uA, deg, mm}
    stat: Stationary

Solver configurations
  sol1 "Solution 1" (study std1)
    v1: Variables "Dependent Variables 1"
    s1: Stationary "Stationary Solver 1"
      dDef: Direct
      fc1: FullyCoupled
  sol2 "Solution 2" (study std2)
    // same settings as sol1
  sol3 "Parametric Solutions 1" (study std2)
  sol15 "Solution 15" (study std3)
    // same settings as sol1
  sol16 "Parametric Solutions 2" (study std3)
  sol54 "Solution 54" (study std4)
    // same settings as sol1
  sol55 "Parametric Solutions 3" (study std4)

Datasets
  dset1: Solution | solution = sol1
  dset2: Solution | solution = sol2
  dset3: Solution | solution = sol3
  dset4: Solution | solution = sol15
  dset5: Solution | solution = sol16
  dset6: Solution | solution = sol54
  dset7: Solution | solution = sol55

Derived values
  gev1: EvalGlobal "Global Evaluation 1"
    data = dset7
    table = tbl4
    expr = {aveop1(V), aveop2(V), aveop3(V), aveop2(V) - aveop1(V), aveop3(V) - aveop1(V), aveop3(V) - aveop2(V)}
    unit = {mV, mV, mV, mV, mV, mV}
    descr = {RA, LA, LL, VI, VII, VIII}

Tables
  tbl2: Table
    // Global Evaluation 1
    p (uA) | alpha (deg) | RA (mV) | LA (mV) | LL (mV) | V1 (mV) | V2 (mV) | V3 (mV)
    2.74 | 173.4 | 0.166344 | 0.0164541 | 0.0764042 | -0.14989 | -0.0899402 | 0.0599501
    2.4 | 113.2 | 0.0909434 | 0.0387225 | -0.0402158 | -0.0522209 | -0.131159 | -0.0789383
    3.72 | 81.9 | 0.0272084 | 0.0557958 | -0.133883 | 0.0285873 | -0.161091 | -0.189679
    20 | 54 | -0.440676 | 0.205404 | -0.888177 | 0.64608 | -0.447501 | -1.09358
    15.8 | 29.5 | -0.691977 | 0.0646281 | -0.684192 | 0.756605 | 0.00778529 | -0.74882
    13.22 | 12.4 | -0.720458 | -0.00974465 | -0.5003 | 0.710713 | 0.220158 | -0.490555
    3.84 | -9.5 | -0.234559 | -0.0259775 | -0.100089 | 0.208581 | 0.13447 | -0.0741117
    2.68 | -48.2 | -0.137505 | -0.0390008 | 0.00688819 | 0.098504 | 0.144393 | 0.045889
  tbl3: Table
    // Global Evaluation 1
  tbl4: Table
    // Global Evaluation 1
    p (uA) | alpha (deg) | RA (mV) | LA (mV) | LL (mV) | VI (mV) | VII (mV) | VIII (mV)
    2.74 | 173.4 | 0.166344 | 0.0164541 | 0.0764042 | -0.14989 | -0.0899402 | 0.0599501
    2.4 | 113.2 | 0.0909434 | 0.0387225 | -0.0402158 | -0.0522209 | -0.131159 | -0.0789383
    3.72 | 81.9 | 0.0272084 | 0.0557958 | -0.133883 | 0.0285873 | -0.161091 | -0.189679
    20 | 54 | -0.440676 | 0.205404 | -0.888177 | 0.64608 | -0.447501 | -1.09358
    15.8 | 29.5 | -0.691977 | 0.064628 | -0.684192 | 0.756605 | 0.00778547 | -0.74882
    13.22 | 12.4 | -0.720458 | -0.00974466 | -0.5003 | 0.710713 | 0.220158 | -0.490555
    3.84 | -9.5 | -0.234559 | -0.0259775 | -0.100089 | 0.208581 | 0.13447 | -0.0741117
    2.68 | -48.2 | -0.137505 | -0.0390008 | 0.00688819 | 0.098504 | 0.144393 | 0.045889

Plots
  pg8: PlotGroup2D "Electric Signals" | data = dset7
    surf1: Surface | expr = V; unit = mV
    str1: Streamline | expr = {ec.Ex, ec.Ey}; udist = 0.04; pointtype = arrow; arrowlength = proportional; maxsteps = 5000
      col1: Color "Color Expression 1" | expr = V
      filt1: Filter | expr = !isScalingSystemDomain
  pg2: PlotGroup2D "Electric Field (ec)" | data = dset7
    surf1: Surface | expr = V; unit = mV
    str1: Streamline on boundaries 1-9, 13-24
      expr = {ec.Ex, ec.Ey}
      udist = 0.04
      pointtype = arrow
      arrowlength = proportional
      arrowscale = 3
      maxsteps = 5000
      col1: Color "Color Expression 1" | expr = ec.normE
      filt1: Filter | expr = !isScalingSystemDomain
  pg3: PlotGroup2D "Electric Potential (ec) 1" | data = dset7
    surf1: Surface | expr = V; unit = mV
    str1: Streamline | expr = {ec.Ex, ec.Ey}; udist = 0.02; maxsteps = 5000
      col1: Color "Color Expression 1" | expr = V
      filt1: Filter | expr = !isScalingSystemDomain
  pg4: PlotGroup2D "Electric Field (ec) 1" | data = dset3
    surf1: Surface | expr = ec.normE
    str1: Streamline on boundaries 1-24 | expr = {ec.Ex, ec.Ey}; udist = 0.02; maxsteps = 5000
      col1: Color "Color Expression 1" | expr = ec.normE
      filt1: Filter | expr = !isScalingSystemDomain
  pg6: PlotGroup2D "Electric Potential (ec) 2" | data = dset5
    surf1: Surface | expr = V
    str1: Streamline on boundaries 1-24 | expr = {ec.Ex, ec.Ey}; udist = 0.02; maxsteps = 5000
      col1: Color "Color Expression 1" | expr = V
      filt1: Filter | expr = !isScalingSystemDomain
  pg7: PlotGroup2D "Electric Field (ec) 2" | data = dset5
    surf1: Surface | expr = ec.normE
    str1: Streamline on boundaries 1-24 | expr = {ec.Ex, ec.Ey}; udist = 0.02; maxsteps = 5000
      col1: Color "Color Expression 1" | expr = ec.normE
      filt1: Filter | expr = !isScalingSystemDomain
  pg9: PlotGroup2D "Electric Field (ec) 3" | data = dset7
    surf1: Surface | expr = ec.normE
    str1: Streamline on boundaries 1-24 | expr = {ec.Ex, ec.Ey}; udist = 0.02; maxsteps = 5000
      col1: Color "Color Expression 1" | expr = ec.normE
      filt1: Filter | expr = !isScalingSystemDomain
  pg10: PlotGroup1D "1D Plot Group 1" | data = dset7
    glob1: Global
      expr = {aveop2(V) - aveop1(V), aveop3(V) - aveop1(V), aveop3(V) - aveop2(V)}
      unit = {mV, mV, mV}
      descr = {V1, V2, V3}