// COMSOL Multiphysics 6.3.0.335 model "Bhatt-HW4-COMSOL-2.mph"
// Outline of the model tree

Parameters
  radius = 10[cm]
  a = 1[cm]
  b = 2[mm]
  p = 0.03[mA]
  d = 4[mm]
  alpha = 0[deg]
  x1 = -8.66[cm]
  y1 = 5[cm]
  x2 = 8.66[cm]
  y2 = 5[cm]
  x3 = 0[cm]
  y3 = -10[cm]

Couplings
  aveop1: Average "Average RA" on boundaries 5
  aveop2: Average "Average LA" on boundaries 11
  aveop3: Average "Average LL" on boundaries 8

Geometry
  geom1 "Geometry 1" (2D, length unit m)
    sq1: Square | base = center
    c1: Circle | r = 0.1
    r1: Rectangle "Right Arm" | size = {a, b}; base = center; pos = {x1, y1}; rot = 60
    r2: Rectangle "Left Arm" | size = {a, b}; base = center; pos = {x2, y2}; rot = -60
    r3: Rectangle "Left Leg" | size = {a, b}; base = center; pos = {x3, y3}
    pt1: Point "Right" | p = {d/2*cos(alpha), d/2*sin(alpha)}
    pt2: Point "Left" | p = {-d/2*cos(alpha), -d/2*sin(alpha)}
    pt3: Point "Ground_ref_1" (disabled)
    r4: Rectangle "Ground_ref_2" (disabled) | size = {a, b}; base = center; pos = {-radius, 0}; rot = 90
    r5: Rectangle "Groud_ref_3" | size = {a, b}; base = center; pos = {radius, 0}; rot = 90
    fin: Finalize "Form Union"
    ige1: IgnoreEdges | input = fin(1) boundaries 6, 7, 9, 12, 13, 15-17, 20, 22-24

Materials
  mat3: Common "River water" on domains 1
    def: def "Basic"
      thermalexpansioncoefficient = alpha_p(T)
      bulkviscosity = muB(T)
      dynamicviscosity = eta(T)
      ratioofspecificheat = gamma_w(T)
      electricconductivity = 0.483[mS/cm]
      heatcapacity = Cp(T)
      density = rho(T)
      thermalconductivity = k(T)
      soundspeed = cs(T)
      relpermittivity = 80
      eta: Piecewise
        arg = T
        pieces = 
          {273.15, 413.15, 1.3799566804-0.021224019151*T^1+1.3604562827E-4*T^2-4.6454090319E-7*T^3+8.9042735735E-10*T^4-9.0790692686E-13*T^5+3.8457331488E-16*T^6}
          {413.15, 553.75, 0.00401235783-2.10746715E-5*T^1+3.85772275E-8*T^2-2.39730284E-11*T^3}
        argunit = K
        fununit = Pa*s
      Cp: Piecewise | arg = T; pieces = {273.15, 553.75, 12010.1471-80.4072879*T^1+0.309866854*T^2-5.38186884E-4*T^3+3.62536437E-7*T^4}; argunit = K; fununit = J/(kg*K)
      rho: Piecewise
        arg = T
        smooth = contd1
        pieces = 
          {273.15, 293.15, 6.3092789034e-05*T^3-0.0603676398829*T^2+18.9229382407066*T-950.704055329848}
          {293.15, 373.15, 1.0335053319e-05*T^3-0.0133950656345*T^2+4.96928883266*T+432.257114008512}
        argunit = K
        fununit = kg/m^3
      k: Piecewise | arg = T; pieces = {273.15, 553.75, -0.869083936+0.00894880345*T^1-1.58366345E-5*T^2+7.97543259E-9*T^3}; argunit = K; fununit = W/(m*K)
      cs: Interpolation
        funcnametable = {cs, 1}
        table = {{273, 1403}, {278, 1427}, {283, 1447}, {293, 1481}, {303, 1507}, {313, 1526}, {323, 1541}, {333, 1552}, {343, 1555}, {353, 1555}, {363, 1550}, {373, 1543}}
        interp = piecewisecubic
        fununit = m/s
        argunit = K
      an1: Analytic | funcname = alpha_p; expr = -1/rho(T)*d(rho(T),T); args = T; fununit = 1/K; argunit = K
      an2: Analytic | funcname = gamma_w; expr = 1+(T/Cp(T))*(alpha_p(T)*cs(T))^2; args = T; fununit = 1; argunit = K
      an3: Analytic | funcname = muB; expr = 2.79*eta(T); args = T; fununit = Pa*s; argunit = K
  mat1: Common "Muscle" on domains 3
    def: def "Basic"
      heatcapacity = 3421[J/(kg*K)]
      density = 1090[kg/m^3]
      thermalconductivity = 0.49[W/(m*K)]
      electricconductivity = 0.1
      relpermittivity = 66
  mat2: Common "Steel AISI 4340" on domains 2, 4-6
    def: def "Basic"
      relpermeability = 1
      electricconductivity = 4.032e6[S/m]
      thermalexpansioncoefficient = 12.3e-6[1/K]
      heatcapacity = 475[J/(kg*K)]
      relpermittivity = 1
      density = 7850[kg/m^3]
      thermalconductivity = 44.5[W/(m*K)]
    Enu: Enu "Young's modulus and Poisson's ratio"
      E = 205[GPa]
      nu = 0.28

Physics
  ec: ConductiveMedia "Electric Currents" on all domains
    dependent variable V
    cucn1: CurrentConservation (default)
    ein1: ElectricInsulation (default)
    init1: init "Initial Values 1" (default)
    lcs1: LineCurrentSource "Right_Pos" on points 13 | Qjl = p/d
    lcs2: LineCurrentSource "Left_Neg" on points 10 | Qjl = -p/d
    gnd1: Ground (disabled) on no points
    gnd2: Ground (disabled) on no boundaries
    gnd3: Ground on boundaries 15

Mesh
  mesh1 "Mesh 1" (physics-controlled)
    size: MeshSizeDefault | hauto = 2

Studies
  std1 "Study 1"
    stat: Stationary
  std2 "Study 2"
    param: Parametric "Parametric Sweep" | pname = d; plistarr = range(1[mm], 5[mm], 51[mm]); punit = mm
    stat: Stationary
  std3 "Study 3"
    param: Parametric "Parametric Sweep" | pname = alpha; plistarr = range(-180[deg], 10[deg], 180[deg]); punit = deg
    stat: Stationary
  std4 "Study 4"
    param: Parametric "Parametric Sweep"
      pname = {p, alpha}
      plistarr = {2.74[uA] 2.40[uA] 3.72[uA] 20.00[uA] 15.8[uA] 13.22[uA] 3.84[uA] 2.68[uA], 173.4[deg] 113.2[deg] 81.9[deg] 54[deg] 29.5[deg] 12.4[deg] -9.5[deg] -48.2[deg]}
      punit = {uA, deg}
    stat: Stationary

Solver configurations
  sol1 "Solution 1" (study std1)
    v1: Variables "Dependent Variables 1"
    s1: Stationary "Stationary Solver 1"
      dDef: Direct
      fc1: FullyCoupled
  sol2 "Solution 2" (study std2)
    // same settings as sol1
  sol3 "Parametric Solutions 1" (study std2)
  sol15 "Solution 15" (study std3)
    // same settings as sol1
  sol16 "Parametric Solutions 2" (study std3)
  sol54 "Solution 54" (study std4)
    // same settings as sol1
  sol55 "Parametric Solutions 3" (study std4)

Datasets
  dset1: Solution | solution = sol1
  dset2: Solution | solution = sol2
  dset3: Solution | solution = sol3
  dset4: Solution | solution = sol15
  dset5: Solution | solution = sol16
  dset6: Solution | solution = sol54
  dset7: Solution | solution = sol55

Derived values
  gev1: EvalGlobal "Global Evaluation 1"
    data = dset7
    table = tbl2
    expr = {aveop1(V), aveop2(V), aveop3(V), aveop2(V) - aveop1(V), aveop3(V) - aveop1(V), aveop3(V) - aveop2(V)}
    unit = {mV, mV, mV, mV, mV, mV}
    descr = {RA, LA, LL, V1, V2, V3}

Tables
  tbl2: Table
    // Global Evaluation 1
    p (uA) | alpha (deg) | RA (mV) | LA (mV) | LL (mV) | V1 (mV) | V2 (mV) | V3 (mV)
    2.74 | 173.4 | 0.114228 | 0.0112771 | 0.0524567 | -0.102951 | -0.0617714 | 0.0411796
    2.4 | 113.2 | 0.062442 | 0.0265585 | -0.027631 | -0.0358836 | -0.0900731 | -0.0541895
    3.72 | 81.9 | 0.0186654 | 0.0382726 | -0.0919562 | 0.0196072 | -0.110622 | -0.130229
    20 | 54 | -0.302702 | 0.140923 | -0.609971 | 0.443625 | -0.307269 | -0.750894
    15.8 | 29.5 | -0.475223 | 0.0443728 | -0.469841 | 0.519596 | 0.00538189 | -0.514214
    13.22 | 12.4 | -0.494773 | -0.00665756 | -0.343547 | 0.488115 | 0.151226 | -0.336889
    3.84 | -9.5 | -0.161069 | -0.0178051 | -0.068716 | 0.143264 | 0.0923529 | -0.0509109
    2.68 | -48.2 | -0.0944113 | -0.0267435 | 0.0047517 | 0.0676678 | 0.099163 | 0.0314952

Plots
  pg1: PlotGroup2D "Electric Signals" | data = dset7
    surf1: Surface "Electrical Signals" | expr = V; unit = mV
    str1: Streamline
      expr = {ec.Jx, ec.Jy}
      udist = 0.04
      pointtype = arrow
      arrowlength = proportional
      arrowscale = 3
      maxsteps = 5000
      col1: Color "Color Expression 1" | expr = ec.normJ
      filt1: Filter | expr = !isScalingSystemDomain
  pg2: PlotGroup2D "Electric Field (ec)" | data = dset1
    surf1: Surface | expr = ec.normE
    str1: Streamline on boundaries 4-12, 17-28 | expr = {ec.Ex, ec.Ey}; udist = 0.02; maxsteps = 5000
      col1: Color "Color Expression 1" | expr = ec.normE
      filt1: Filter | expr = !isScalingSystemDomain
  pg3: PlotGroup2D "Electric Potential (ec) 1" | data = dset3
    surf1: Surface | expr = V
    str1: Streamline on boundaries 4-15, 17-28 | expr = {ec.Ex, ec.Ey}; udist = 0.02; maxsteps = 5000
      col1: Color "Color Expression 1" | expr = V
      filt1: Filter | expr = !isScalingSystemDomain
  pg4: PlotGroup2D "Electric Field (ec) 1" | data = dset3
    surf1: Surface | expr = ec.normE
    str1: Streamline on boundaries 4-15, 17-28 | expr = {ec.Ex, ec.Ey}; udist = 0.02; maxsteps = 5000
      col1: Color "Color Expression 1" | expr = ec.normE
      filt1: Filter | expr = !isScalingSystemDomain
  pg5: PlotGroup1D "1D Plot Group 1" | data = dset7
    glob1: Global "VI-VIII"
      expr = {aveop2(V)-aveop1(V), aveop3(V)-aveop1(V), aveop3(V)-aveop2(V)}
      unit = {mV, mV, mV}
      descr = {V1, V2, V3}
      xdataexpr = 10*solnum
  pg6: PlotGroup2D "Electric Potential (ec) 2" | data = dset5
    surf1: Surface | expr = V
    str1: Streamline on boundaries 4-15, 17-28 | expr = {ec.Ex, ec.Ey}; udist = 0.02; maxsteps = 5000
      col1: Color "Color Expression 1" | expr = V
      filt1: Filter | expr = !isScalingSystemDomain
  pg7: PlotGroup2D "Electric Field (ec) 2" | data = dset5
    surf1: Surface | expr = ec.normE
    str1: Streamline on boundaries 4-15, 17-28 | expr = {ec.Ex, ec.Ey}; udist = 0.02; maxsteps = 5000
      col1: Color "Color Expression 1" | expr = ec.normE
      filt1: Filter | expr = !isScalingSystemDomain
  pg8: PlotGroup2D "Electric Potential (ec) 3" | data = dset7
    surf1: Surface | expr = V
    str1: Streamline on boundaries 4-15, 17-28 | expr = {ec.Ex, ec.Ey}; udist = 0.02; maxsteps = 5000
      col1: Color "Color Expression 1" | expr = V
      filt1: Filter | expr = !isScalingSystemDomain
  pg9: PlotGroup2D "Electric Field (ec) 3" | data = dset7
    surf1: Surface | expr = ec.normE
    str1: Streamline on boundaries 4-15, 17-28 | expr = {ec.Ex, ec.Ey}; udist = 0.02; maxsteps = 5000
      col1: Color "Color Expression 1" | expr = ec.normE
      filt1: Filter | expr = !isScalingSystemDomain

Exports
  anim1: Animation
    giffilename = /Users/mananbhatt/Desktop/JOHNS HOPKINS/SEM_2/ABE/COMSOL/HW_4_COMSOL/Bhatt- HW4-Movie-1.gif
    framesel = all
  anim2: Animation
    giffilename = /Users/mananbhatt/Desktop/JOHNS HOPKINS/SEM_2/ABE/COMSOL/HW_4_COMSOL/Bhatt- HW4-Movie-2.gif
    framesel = all
  anim3: Animation
    giffilename = /Users/mananbhatt/Desktop/JOHNS HOPKINS/SEM_2/ABE/COMSOL/HW_4_COMSOL/Bhatt- HW4-Movie-3.gif
    framesel = all
  anim4: Animation
    giffilename = /Users/mananbhatt/Desktop/JOHNS HOPKINS/SEM_2/ABE/COMSOL/HW_4_COMSOL/Bhatt- HW4-Movie-5.gif
    framesel = all